*HEADING
cubit(lel tetopsplit/finalsims/3363_0.10.8/meshes/10x10x300.inp): 09/04/2016: 00
version: 15.2
**
********************************** P A R T S **********************************
*PART, NAME=Part-Default
**
********************************** N O D E S **********************************
*NODE, NSET=ALLNODES
   21565,    5.000000e+00,   -5.000000e+00,    5.000000e+01
   21566,    5.000000e+00,    5.000000e+00,    5.000000e+01
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**
********************************** E L E M E N T S ****************************
*ELEMENT, TYPE=C3D4, ELSET=EB2
  116460,   22799,   22922,   22923,   22924
  116461,   22673,   22925,   22706,   22926
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*ELEMENT, TYPE=C3D4, ELSET=EB3
  119892,   23769,   23770,   23771,   23772
  119893,   23769,   23773,   23770,   23772
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*ELEMENT, TYPE=C3D4, ELSET=EB1
  113097,   22085,   22086,   22087,   22088
  113098,   22089,   22090,   22091,   22088
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**
********************************** P R O P E R T I E S ************************
*SOLID SECTION, ELSET=EB2, MATERIAL=Default-Steel
*SOLID SECTION, ELSET=EB3, MATERIAL=Default-Steel
*SOLID SECTION, ELSET=EB1, MATERIAL=Default-Steel
**
*END PART
**
**
**
********************************** E N D   P A R T S **********************************
**
**
********************************** A S S E M B L Y ************************************
**
*ASSEMBLY, NAME=ASSEMBLY1
**
*INSTANCE, NAME=Part-Default_1, PART=Part-Default
*END INSTANCE
**
*END ASSEMBLY
**
**
**
**
************************************** H I S T O R Y *************************************
**
*PREPRINT
**
**************************************** S T E P 1 ***************************************
*STEP,INC=100,NAME=Default Set
**
*STATIC
1, 1, 1e-05, 1
**
**
**
**
*END STEP
